// SBML level 2 version 1

model EBModel()
  // EBModel

  // Compartments:
  compartment Cell = 1;
  compartment Cell_Surface = 1;
  compartment Cell_Cell_Adhesion = 1; Cell_Cell_Adhesion is "Cell-Cell Adhesion";
  compartment E_cadherin = 1;

  // Species:
  species FAK_Cell in Cell = 0; FAK_Cell is "FAK*";
  species GRB_Cell_6 in Cell = 0; GRB_Cell_6 is "GRB*";
  species grb_dvl in Cell = 0;
  species RAC_Cell_8 in Cell = 0; RAC_Cell_8 is "RAC*";
  species jnk in Cell = 0; jnk is "jnk*";
  species $GRB_Cell_10 in Cell = 1/Cell;
  species $dvl in Cell = 1/Cell;
  species $RAC_Cell_12 in Cell = 1/Cell;
  species $JNK in Cell = 1/Cell;
  species L in Cell_Surface = 1/Cell_Surface;
  species $FAK_Cell_Surface in Cell_Surface = 1/Cell_Surface;
  species B_Cell_Cell_Adhesion_16 in Cell_Cell_Adhesion = 1/Cell_Cell_Adhesion;
  species B_Cell_Cell_Adhesion_17 in Cell_Cell_Adhesion = 0; B_Cell_Cell_Adhesion_17 is "B*";
  species Ec in E_cadherin = 1/E_cadherin;
  species Em in E_cadherin = 0;
  species EB in E_cadherin = 0;

  // Reactions:
  R1: L + $FAK_Cell_Surface => FAK_Cell + L; k1*L;
    k1 = 0.0018;
  D1: FAK_Cell => ; FAK_Cell*d1;
    d1 = 0.0036;
  R2: FAK_Cell + $GRB_Cell_10 => GRB_Cell_6 + FAK_Cell; k2*FAK_Cell;
    k2 = 0.0015;
  D3: grb_dvl => ; d3*grb_dvl;
    d3 = 0.003;
  R4: grb_dvl + $RAC_Cell_12 => RAC_Cell_8 + grb_dvl; k4*grb_dvl;
    k4 = 0.0015;
  D4: RAC_Cell_8 => ; d4*RAC_Cell_8;
    d4 = 0.0018;
  R5: RAC_Cell_8 + $JNK => jnk + RAC_Cell_8; k5*RAC_Cell_8;
    k5 = 0.0055;
  D5: jnk => ; d5*jnk;
    d5 = 0.0003;
  R3: GRB_Cell_6 + $dvl => grb_dvl; k3*GRB_Cell_6;
    k3 = 0.003;
  R6: jnk + B_Cell_Cell_Adhesion_16 => B_Cell_Cell_Adhesion_17 + jnk; kcat*B_Cell_Cell_Adhesion_16*jnk/(kmr + B_Cell_Cell_Adhesion_16);
    kcat = 0.0165; kmr = 300;
  D6: B_Cell_Cell_Adhesion_16 => ; D6_D6*B_Cell_Cell_Adhesion_16;
    D6_D6 = 0.0017;
  Beta6: => B_Cell_Cell_Adhesion_16; beta6;
    beta6 = 0.06;
  R7: Ec => Em; k7*Ec;
    k7 = 200;
  R8: B_Cell_Cell_Adhesion_16 + Em => EB; k8*B_Cell_Cell_Adhesion_16*Em;
    k8 = 1.7;
  R9: EB => Ec + B_Cell_Cell_Adhesion_16; k9*EB;
    k9 = 200;

  // Events:
  IncreaseEc: at (time >= 30000): Ec = 1.2;
end
